// COMSOL Multiphysics 6.1.0.252 model "wake validation.mph"
// Outline of the model tree

Geometry
  geom1 "几何 1" (2D, length unit m)
    c2: Circle "圆 2" | r = 0.01
    c1: Circle "圆 1" | r = 0.0005
    c3: Circle "圆 3" | r = 0.0005
    sq1: Square "正方形 1" | pos = {-0.5, -0.5}
    dif1: Difference "差集 1" | input = sq1; input2 = c1
    dif2: Difference "差集 2" | input = c2; input2 = c3
    fin: Finalize "形成联合体"

Materials
  mat1: Common "Air" on domains 1, 2
    def "Basic"
      thermalexpansioncoefficient = alpha_p(pA,T)
      molarmass = 0.02897[kg/mol]
      bulkviscosity = muB(T)
      relpermeability = 1
      relpermittivity = 1
      dynamicviscosity = eta(T)
      ratioofspecificheat = 1.4
      electricconductivity = 0[S/m]
      heatcapacity = Cp(T)
      density = rho(pA,T)
      thermalconductivity = k(T)
      soundspeed = cs(T)
      eta: Piecewise | arg = T; pieces = {200.0, 1600.0, -8.38278E-7+8.35717342E-8*T^1-7.69429583E-11*T^2+4.6437266E-14*T^3-1.06585607E-17*T^4}; argunit = K; fununit = Pa*s
      Cp: Piecewise | arg = T; pieces = {200.0, 1600.0, 1047.63657-0.372589265*T^1+9.45304214E-4*T^2-6.02409443E-7*T^3+1.2858961E-10*T^4}; argunit = K; fununit = J/(kg*K)
      rho: Analytic | expr = pA*0.02897/R_const[K*mol/J]/T; args = {pA, T}; fununit = kg/m^3; argunit = {Pa, K}
      k: Piecewise | arg = T; pieces = {200.0, 1600.0, -0.00227583562+1.15480022E-4*T^1-7.90252856E-8*T^2+4.11702505E-11*T^3-7.43864331E-15*T^4}; argunit = K; fununit = W/(m*K)
      cs: Analytic | expr = sqrt(1.4*R_const[K*mol/J]/0.02897*T); args = T; fununit = m/s; argunit = K
      an1: Analytic | funcname = alpha_p; expr = -1/rho(pA,T)*d(rho(pA,T),T); args = {pA, T}; fununit = 1/K; argunit = {Pa, K}
      an2: Analytic "Analytic 2a" | funcname = muB; expr = 0.6*eta(T); args = T; fununit = Pa*s; argunit = K
    RefractiveIndex
      n = 1
      ki = 0
    NonlinearModel
      BA = (def.gamma+1)/2
    idealGas
      Rs = R_const/Mn
      heatcapacity = Cp(T)
      ratioofspecificheat = 1.4
      molarmass = 0.02897
      Cp: Piecewise | arg = T; pieces = {200.0, 1600.0, 1047.63657-0.372589265*T^1+9.45304214E-4*T^2-6.02409443E-7*T^3+1.2858961E-10*T^4}; argunit = K; fununit = J/(kg*K)
  mat2: Common "H2O (water) [liquid]" on domains 1, 2
    def "基本"
      thermalconductivity = k_liquid_2(T)
      thermalexpansioncoefficient = (alpha_liquid_2(T)+(Tempref-293[K])*if(abs(T-Tempref)>1e-3,(alpha_liquid_2(T)-alpha_liquid_2(Tempref))/(T-Tempref),d(alpha_liquid_2(T),T)))/(1+alpha_liquid_2(Tempref)*(Tempref-293[K]))
      heatcapacity = C_liquid_2(T)
      HC = HC_liquid_2(T)
      VP = VP_liquid_2(T)
      density = rho_liquid_2(T)
      TD = TD_liquid_2(T)
      dynamicviscosity = eta_liquid_1(T)
      SurfF = SurfF(T)
      k_liquid_2: Piecewise | arg = T; pieces = {275.0, 370.0, -0.9003748+0.008387698*T^1-1.118205E-5*T^2}; argunit = K; fununit = W/(m*K)
      alpha_liquid_2: Piecewise
        arg = T
        pieces = 
          {273.15, 283.0, 0.01032507-7.62815E-5*T^1+1.412474E-7*T^2}
          {283.0, 373.16, -0.00246418935+1.947611E-5*T^1-5.049672E-8*T^2+4.616995E-11*T^3}
        argunit = K
        fununit = 1/K
      C_liquid_2: Piecewise | arg = T; pieces = {293.0, 373.16, 4035.84079+0.492312034*T^1}; argunit = K; fununit = J/(kg*K)
      HC_liquid_2: Piecewise | arg = T; pieces = {293.0, 373.16, 72.6451184+0.00886161577*T^1}; argunit = K; fununit = J/(mol*K)
      VP_liquid_2: Piecewise | arg = T; pieces = {280.0, 600.0, (exp((-2.00512183e+03/T-5.56570000e-01*log10(T)+9.89879000e+00-1.11169009e+07/T^3)*log(10.0)))*1.33320000e+02}; argunit = K; fununit = Pa
      rho_liquid_2: Piecewise
        arg = T
        pieces = 
          {273.15, 283.0, 972.757815+0.2084*T^1-4.0E-4*T^2}
          {283.0, 373.16, 345.28+5.749816*T^1-0.0157244*T^2+1.264375E-5*T^3}
        argunit = K
        fununit = kg/m^3
      TD_liquid_2: Piecewise | arg = T; pieces = {273.15, 333.16, 8.04E-8+2.0E-10*T^1}; argunit = K; fununit = m^2/s
      eta_liquid_1: Piecewise | arg = T; pieces = {265.0, 423.16, exp(3.48378315E-09*T^4 - 5.27092524E-06*T^3 + 3.02511035E-03*T^2 - 7.90657912E-01*T + 7.19634916E+01)}; argunit = K; fununit = Pa*s
      SurfF: Piecewise
        arg = T
        pieces = 
          {274.0, 568.0, 0.0774685638+2.071003E-4*T^1-1.23147E-6*T^2+2.344068E-9*T^3-3.033107E-12*T^4+1.758716E-15*T^5}
          {568.0, 647.0, -109.3735+0.9291756*T^1-0.003154159*T^2+5.351438E-6*T^3-4.539449E-9*T^4+1.540327E-12*T^5}
        argunit = K
        fununit = N/m
    ThermalExpansion "热膨胀"
      alphatan = CTE_liquid_2(T)
      dL = (dL_liquid_2(T)-dL_liquid_2(Tempref))/(1+dL_liquid_2(Tempref))
      dL_liquid_2: Piecewise
        arg = T
        pieces = 
          {273.15, 283.0, 0.00848615773-6.947021E-5*T^1+1.333373E-7*T^2}
          {283.0, 373.16, 0.232446447-0.002030447*T^1+5.510259E-6*T^2-4.395999E-9*T^3}
        argunit = K
      CTE_liquid_2: Piecewise
        arg = T
        pieces = 
          {273.15, 283.0, -6.947321E-5+2.666746E-7*T^1}
          {283.0, 293.0, -0.0136371499+8.893977E-5*T^1-1.43925E-7*T^2}
          {293.0, 373.16, -0.00203045035+1.102052E-5*T^1-1.3188E-8*T^2}
        argunit = K
        fununit = 1/K

Physics
  spf: CreepingFlow "层流" on all domains
    dependent variable u = {u, v, w}
    PhysicalModelProperty.StokesFlowProp = 0
    fp1: FluidProperties "流体属性 1" (default) | rho_mat = userdef; rho = 1[kg/m^3]; mu_mat = userdef; mu = 1e-3[Pa*s]
    init1: init "初始值 1" (default)
    wallbc1: WallBC "壁 1" (default)
    inl1: InletBoundary "入口 1" on boundaries 1 | ComponentWise = VelocityFieldComponentWise; u0 = {1, 0, 0}
    out1: OutletBoundary "出口 1" on boundaries 4 | NormalFlow = 1; PressureType = StaticPressure

Mesh
  mesh1 "网格 1"
    size: MeshSizeDefault "大小" | hmin = 1.0E-9; hauto = 3; hmax = 1
    size1: Size "大小 1" on boundaries 7, 8, 10, 11 | hmax = 0.0001; hmin = 4.0E-8; hauto = 1; custom = on
    size2: Size "大小 2" on domains 2 | table = cfd; hmax = 0.0001; hmin = 4.0E-8; hauto = 1; custom = on
    cr1: CornerRefinement "角细化 1" on domains 1, 2 | boundary = boundaries 2, 3, 7, 8, 10, 11
    ftri1: FreeTri "自由三角形网格 1" on remaining entities | smoothmaxiter = 4; smoothmaxdepth = 4
    bl1: BndLayer "边界层 1" on domains 2
      blp1: BndLayerProp "边界层属性 1" on boundaries 2, 3, 7, 8, 10, 11
        blnlayers = 1
        blhminfact = 10
        blhmin = 0.000392
        blhtot = 0.000392

Studies
  std2 "研究 2"
    stat: Stationary "稳态"

Solver configurations
  sol1 "解 1" (study std2)
    v1: Variables "因变量 1"
    s1: Stationary "稳态求解器 1"
      fc1: FullyCoupled "全耦合 1" | linsolver = d1; initstep = 0.01; maxiter = 100
      d1: Direct "直接，流体流动变量 (spf)" | linsolver = pardiso; pivotperturb = 1.0E-13

Datasets
  dset1: Solution | solution = none
  dset2: Solution | solution = none
  dset3: Solution | solution = sol1

Plots
  pg1: PlotGroup2D "速度 (spf)" | data = dset3
    surf1: Surface "表面" | expr = v; descr = 速度场，y 分量
  pg2: PlotGroup2D "压力 (spf)" | data = dset1
    con1: Contour "等值线" | expr = p; levelrounding = off
  pg3: PlotGroup2D "速度 (spf) 1" | data = dset3
    surf1: Surface "表面" | data = dset3; expr = v; descr = 速度场，y 分量
  pg4: PlotGroup2D "压力 (spf) 1" | data = dset3
    con1: Contour "等值线" | expr = p; levelrounding = off

Exports
  data1: Data "数据 1"
    data = dset3
    expr = u-1
    filename = D:\downloads\粒子运动模拟模型\PINN_FFX - Copy\wake_effect\COMSOL_wake\COMSOL_vx.txt