// COMSOL Multiphysics 6.1.0.252 model "验证仿真.mph"
// Outline of the model tree

Parameters
  f = 10000[Hz]
  lambda = c/f
  SPL = 169[dB]
  p_ref = 2e-5 [Pa]
  p_rms = p_ref* (10^(SPL/20))
  p0 = p_rms
  rho = 1.225 [kg/m^3]
  c = 340[m/s]
  omega = 2*pi*f
  k = 2*pi/lambda
  A = p0/(rho*c*omega)
  r = 1e-6 [m]
  gamma = 1.4
  miu = 1.8e-5[Pa*s]
  Cc = 1.083

Functions
  an1: Analytic "SPGF" | funcname = spgf; expr = 2*pi*k^2*gamma*p0*A*r^3*sin(k*x)*sin(omega*t); args = {x, t}
  an2: Analytic "STOKES" | funcname = stokes; expr = -6*pi*miu*r*((-omega*A*cos(k*x)*cos(omega*t))-d(x,t)); args = {x, t}
  an3: Analytic "total" | funcname = total; expr = 2*pi*k^2*gamma*p0*A*r^3*sin(k*x)*sin(omega*t) - (6*pi*miu*r*((omega*A*cos(k*x)*cos(omega*t)))); args = {x, t}; periodic = on; fununit = N; argunit = {m, s}

Variables
  var1 "变量 1"
    displacement = x
    velocity = d(x, t)
    time = t

Geometry
  geom1 "几何 1" (2D, length unit m)
    r1: Rectangle "矩形 1" | pos = {-0.017, 0}; size = {0.068, 0.01}
    fin: Finalize "形成联合体"
  pgeom_fpt "几何" (1D, length unit m)
    pt1: Point "点 1"

Materials
  mat1: Common "Air" on all domains
    def "Basic"
      thermalexpansioncoefficient = alpha_p(pA,T)
      molarmass = 0.02897[kg/mol]
      bulkviscosity = muB(T)
      relpermeability = 1
      relpermittivity = 1
      dynamicviscosity = eta(T)
      ratioofspecificheat = 1.4
      electricconductivity = 0[S/m]
      heatcapacity = Cp(T)
      density = rho(pA,T)
      thermalconductivity = k(T)
      soundspeed = 340
      eta: Piecewise | arg = T; pieces = {200.0, 1600.0, -8.38278E-7+8.35717342E-8*T^1-7.69429583E-11*T^2+4.6437266E-14*T^3-1.06585607E-17*T^4}; argunit = K; fununit = Pa*s
      Cp: Piecewise | arg = T; pieces = {200.0, 1600.0, 1047.63657-0.372589265*T^1+9.45304214E-4*T^2-6.02409443E-7*T^3+1.2858961E-10*T^4}; argunit = K; fununit = J/(kg*K)
      rho: Analytic | expr = pA*0.02897/R_const[K*mol/J]/T; args = {pA, T}; fununit = kg/m^3; argunit = {Pa, K}
      k: Piecewise | arg = T; pieces = {200.0, 1600.0, -0.00227583562+1.15480022E-4*T^1-7.90252856E-8*T^2+4.11702505E-11*T^3-7.43864331E-15*T^4}; argunit = K; fununit = W/(m*K)
      cs: Analytic | expr = sqrt(1.4*R_const[K*mol/J]/0.02897*T); args = T; fununit = m/s; argunit = K
      an1: Analytic | funcname = alpha_p; expr = -1/rho(pA,T)*d(rho(pA,T),T); args = {pA, T}; fununit = 1/K; argunit = {Pa, K}
      an2: Analytic "Analytic 2a" | funcname = muB; expr = 0.6*eta(T); args = T; fununit = Pa*s; argunit = K
    RefractiveIndex
      n = 1
      ki = 0
    NonlinearModel
      BA = (def.gamma+1)/2
    idealGas
      Rs = R_const/Mn
      heatcapacity = Cp(T)
      ratioofspecificheat = 1.4
      molarmass = 0.02897
      Cp: Piecewise | arg = T; pieces = {200.0, 1600.0, 1047.63657-0.372589265*T^1+9.45304214E-4*T^2-6.02409443E-7*T^3+1.2858961E-10*T^4}; argunit = K; fununit = J/(kg*K)

Physics
  fpt: FluidParticleTracing "流体流动颗粒跟踪" on all domains
    dependent variable q = {qx, qy, qz}
    MaximumSecondary.MaximumSecondary = 0
    wall1: Wall "壁 1" (default) | WallCondition = Bounce
    pp1: ParticleProperties "粒子属性 1"
      dp = 2[um]
      ParticleType = LiquidDropletsBubbles
      rhop_mat = userdef
      rhop = 2000[kg/m^3]
    for1: Force "力 1" on domains 1 | F = {total(x,t), 0, 0}
    relg1: ReleaseGrid "从栅格释放 1" | x0 = {range(-0.005,0.00001,0.039), 0.005}
    df1: DragForce "曳力 1" on domains 1
      DragLaw = Stokes
      u_src = fromCommonDef
      mu_mat = userdef
      mu = miu
      rho_mat = userdef
      rho = rho

Mesh
  mesh1 "网格 1"
    size: MeshSizeDefault "大小" | hmax = 1E-4; hauto = 1; custom = on
    size1: Size "大小 1" on domains 1 | hmin = 3.4000E-7; custom = on
    ftri1: FreeTri "自由三角形网格 1" on remaining entities | smoothmaxiter = 4; smoothmaxdepth = 4

Studies
  std1 "研究 1"
    time: Transient "瞬态" | tlist = range(0,1e-2,1e-1)

Solver configurations
  sol1 "解 1" (study std1)
    v1: Variables "因变量 1"
    t1: Time "瞬态求解器 1"
      tlist = range(0,1e-2,1e-1)
      rtol = 1.0E-5
      timemethod = genalpha
      estrat = exclude
      tstepsgenalpha = manual
      timestepgenalpha = 1e-7
      fc1: FullyCoupled "全耦合 1" | linsolver = i1; ntolfact = 0.1
      i1: Iterative "迭代 1"
        ja1: Jacobi "雅可比 1"

Datasets
  dset1: Solution | solution = sol1
  part1: Particle "粒子 1"
    solution = sol1
    pgeomspec = fromphysics
    pgeom = pgeom_fpt
    posdof = {comp1.qx, comp1.qy}
    physicsinterface = fpt

Derived values
  par1: Particle "粒子计算 1" | data = part1; table = tbl1; expr = qx; unit = mm; descr = 粒子位置，x 分量

Tables
  tbl1: Table "表格 1"
    // 粒子计算 1
    Time (s) | 粒子位置，x 分量, 粒子 1 (mm) | 粒子 2 | 粒子 3 | 粒子 4 | 粒子 5 | 粒子 6 | 粒子 7 | 粒子 8 | 粒子 9 | 粒子 10 | 粒子 11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
    0 | -5 | -4.99 | -4.98 | -4.97 | -4.96 | -4.95 | -4.94 | -4.93 | -4.92 | -4.91 | -4.9
    0.01 | -5.10483 | -5.09691 | -5.08898 | -5.08106 | -5.07314 | -5.06521 | -5.05729 | -5.04936 | -5.04143 | -5.0335 | -5.02557
    0.02 | -5.18246 | -5.17609 | -5.16971 | -5.16334 | -5.15696 | -5.15058 | -5.1442 | -5.13782 | -5.13143 | -5.12505 | -5.11866
    0.03 | -5.24492 | -5.23979 | -5.23466 | -5.22954 | -5.22441 | -5.21927 | -5.21414 | -5.20901 | -5.20387 | -5.19873 | -5.19359
    0.04 | -5.29513 | -5.29101 | -5.28689 | -5.28276 | -5.27864 | -5.27451 | -5.27039 | -5.26626 | -5.26213 | -5.258 | -5.25387
    0.05 | -5.33548 | -5.33217 | -5.32886 | -5.32555 | -5.32223 | -5.31892 | -5.3156 | -5.31228 | -5.30896 | -5.30564 | -5.30232
    0.06 | -5.36791 | -5.36525 | -5.36259 | -5.35992 | -5.35726 | -5.3546 | -5.35193 | -5.34927 | -5.3466 | -5.34393 | -5.34126
    0.07 | -5.39396 | -5.39182 | -5.38968 | -5.38754 | -5.3854 | -5.38326 | -5.38112 | -5.37898 | -5.37684 | -5.37469 | -5.37255
    0.08 | -5.41488 | -5.41316 | -5.41145 | -5.40973 | -5.40801 | -5.40629 | -5.40457 | -5.40285 | -5.40113 | -5.39941 | -5.39769
    0.09 | -5.43169 | -5.43031 | -5.42893 | -5.42755 | -5.42617 | -5.42479 | -5.42341 | -5.42203 | -5.42064 | -5.41926 | -5.41788
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
Plots
  pg1: PlotGroup2D "粒子轨迹 (fpt)" | data = part1
    traj1: ParticleTrajectories "粒子轨迹 1" | linetype = none; pointtype = point
      col1: Color "颜色表达式 1" | expr = fpt.V